point_number := 30
m := point_number
angle :=
    for i ∈ 0 .. point_number
        A[i] ← i/30*π
    return A
l := 1
M := [
    -0.0176665116305; 3.51860094956; 6.43373640653; 8.31880889036; 10.0761361502; 11.4975772112; 12.6441473058; 13.2612400165; 14.7213124877; 15.308742738
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]
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M := M*l = [
    -0.0176665; 3.5186; 6.43374; 8.31881; 10.0761; 11.4976; 12.6441; 13.2612; 14.7213; 15.3087
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]
a :=
    for n ∈ 1 .. m
        a[n] ← 1/m*sum(M[k]*cos(π*k/m*n), k = 1 .. m)
    return a
M0 := 1/m*sum(M[k], k = 1 .. m) = 11.7227
a = [
    0; 0.268693; -2.45698; -0.635124; -1.13723; 0.389243; -0.568376; -0.073063; -0.520522; 0.0841601
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]
b :=
    for n ∈ 1 .. m
        b[n] ← 1/m*sum(M[k]*sin(π*k/m*n), k = 1 .. m)
    return b
M_f :=
    for n ∈ 1 .. m
        M_f[n] ← sqrt(a[n]^2 + b[n]^2)
    return M_f
φ := atan2(b, a)  # angle.i =i/m*π
M_res_1 :=
    for i ∈ 1 .. m
        M_r_1[i] ← M0/2 + sum(M_f[n]*sin(angle[i]*n + φ[n]), n = 1 .. m)
    return M_r_1
a = [
    0; 0.268693; -2.45698; -0.635124; -1.13723; 0.389243; -0.568376; -0.073063; -0.520522; 0.0841601
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]
b = [
    0; 8.64146; 0.505578; 1.37333; -0.586779; 0.40566; 0.177044; 0.279168; -0.0751459; -0.0157717
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]
φ = [
    -1.5708; 0.0310835; -1.36786; -0.433175; -2.04714; 0.764748; -1.26883; -0.255976; -1.71417; 1.75605
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]
M_res_2 :=
    for i ∈ 1 .. m
        M_r_2[i] ← M0/2 + sum(a[n]*cos(angle[i]*n) + b[n]*sin(angle[i]*n), n = 1 .. m)
    return M_r_2
angle_left_shift :=
    for i ∈ 0 .. point_number
        A[i] ← angle[i] - 2*π/3
    return A
φ = [
    -1.5708; 0.0310835; -1.36786; -0.433175; -2.04714; 0.764748; -1.26883; -0.255976; -1.71417; 1.75605
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]
M_f = [
    0; 8.64563; 2.50846; 1.51308; 1.27969; 0.562201; 0.595311; 0.288571; 0.525919; 0.0856252
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]
angle = [
    0; 0.10472; 0.20944; 0.314159; 0.418879; 0.523599; 0.628319; 0.733038; 0.837758; 0.942478
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]
M = [
    -0.0176665; 3.5186; 6.43374; 8.31881; 10.0761; 11.4976; 12.6441; 13.2612; 14.7213; 15.3087
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]
M_res_1 = [
    0; 3.53078; 6.42156; 8.33099; 10.064; 11.5098; 12.632; 13.2734; 14.7091; 15.3209
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]
M_res_2 = [
    0; 3.53078; 6.42156; 8.33099; 10.064; 11.5098; 12.632; 13.2734; 14.7091; 15.3209
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]
angle_right_shift :=
    for i ∈ 0 .. point_number
        A[i] ← angle[i] + 2*π/3
    return A
M_f[3]/sqrt(sum(M_f[n]^2, n = 1 .. 20)) = 0.162987
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vs := pspline(angle, M_res_1)
vs_left := pspline(angle_left_shift, M_res_1)
vs_right := pspline(angle_right_shift, M_res_1)
M(θ) := interp(vs_left, angle, M_res_1, θ)
M_left(θ) := interp(vs_left, angle_left_shift, M_res_1, θ)
M_right(θ) := interp(vs_right, angle_right_shift, M_res_1, θ)
θ_A := 0.684
θ_B := 2.779
M_A := 11.384
M_B := 11.384
(θ_A + θ_B)/2 = 1.7315  # Не симметрично относительно середины (
angle_left_shift :=
    for i ∈ 0 .. point_number
        A[i] ← angle[i] - 2*π/3
    return A
Harm :=
    for ind ∈ 1 .. m
        for i ∈ 1 .. m
            H[ind, i] ← M_f[ind]*sin(angle[i]*ind + φ[ind])
    return H
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Harm :=
    for ind ∈ 1 .. m
        for i ∈ 1 .. m
            H[ind, i] ← M_f[ind]*sin(angle[i]*ind)
    return H
Harm =  # no stored result
M_MAX := 25.846
M_MIN := M_A
M0 = 11.7227
ΔM := (M_MAX - M_MIN)/(2*M0) = 0.616838
# Проверить М макс
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transpose(Harm)[:, 1] = [
    0; 0.903715; 1.79753; 2.67165; 3.5165; 4.32282; 5.08178; 5.78506; 6.42496; 6.99446
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]
transpose(Harm)[:, 2] = [
    0; 0.521538; 1.02028; 1.47444; 1.86415; 2.17239; 2.38569; 2.49472; 2.49472; 2.38569
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]
transpose(Harm)[:, 3] = [
    0; 0.467569; 0.889368; 1.22411; 1.43903; 1.51308; 1.43903; 1.22411; 0.889368; 0.467569
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]
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Мощность
D_max := 115.83  # мм
k_zap := 0.33
D_min := 90  # мм
angle := 60
j := 30  # А/мм^2
l = 1  # м
ρ_w := 0.017  # Ом*мм^2/м
S_paz := π/4*(D_max^2 - D_min^2)*angle/360
S_w := S_paz*2*k_zap = 459.32
P := ρ_w*l*S_w*j^2
P = 7027.6  # Вт
# Эффективность в создании МДС
1/Ом
K_F := S_paz*k_zap/(2*ρ_w*2*l) = 3377.36
# Эффективность в создании момента
K_T := M_MAX/P = 0.00367778
# Удельное окружное усилие
D_R := 90*10^-3
σ := 2*M_MAX/(π*D_R^2*l) = 2031.37
